// SBML level 2 version 4

model Immune_Oncology_Model()
  // Immune Oncology Model

  // Compartments:
  // Central compartment (C) Central compartment volume
  compartment V_C = 5 MWBUILTINUNIT_liter;
  // Peripheral compartment (P) Peripheral compartment volume
  compartment V_P = 60 MWBUILTINUNIT_liter;
  // Tumor compartment (T) Cancer-free Tumour compartment volume
  compartment V_T; V_T has MWBUILTINPREFIX_micro_MWBUILTINUNIT_liter;
  // Lymph node (LN) compartment volume Lymph Node compartment volume
  compartment V_LN = 1374.447 MWDERIVEDUNIT_millimeter___3;
  // synapse comparment between T1 and C1 Synapse Surface Area
  compartment syn_T1_C1 = 37.8 MWDERIVEDUNIT_micrometer___2;  // 2-D

  // Species:
  // Number of naive T1 cells in the central compartment
  substanceOnly species nT1_V_C in V_C = 2274.775;  // substance in MWUSERUNIT_cell
  // Number of T1 cells in the central compartment
  substanceOnly species T1_V_C in V_C = 0;  // substance in MWUSERUNIT_cell
  // Number of naive T2 cells in the central compartment
  substanceOnly species nT2_V_C in V_C = 2274.775;  // substance in MWUSERUNIT_cell
  // Number of T2 cells in the central compartment
  substanceOnly species T2_V_C in V_C = 0;  // substance in MWUSERUNIT_cell
  // Concentration of nivolumab in central compartment
  species nivolumab_V_C in V_C = 0;  // substance in MWDERIVEDUNIT_molarity_liter
  // Number of naive T1 cells in the peripheral compartment
  substanceOnly species nT1_V_P in V_P = 113738.7;  // substance in MWUSERUNIT_cell
  // Number of T1 cells in the peripheral compartment
  substanceOnly species T1_V_P in V_P = 0;  // substance in MWUSERUNIT_cell
  // Number of naive T2 cells in the peripheral compartment
  substanceOnly species nT2_V_P in V_P = 113738.7;  // substance in MWUSERUNIT_cell
  // Number of T2 cells in the peripheral compartment
  substanceOnly species T2_V_P in V_P = 0;  // substance in MWUSERUNIT_cell
  // Concentration of nivolumab in peripheral compartment
  species nivolumab_V_P in V_P = 0;  // substance in MWDERIVEDUNIT_molarity_liter
  // Dead cancer cells in the tumour compartment
  substanceOnly species C_x in V_T = 0;  // substance in MWUSERUNIT_cell
  // Exhausted T cells
  substanceOnly species T_exh in V_T = 0;  // substance in MWUSERUNIT_cell
  // Number of cancer cells in tumour
  substanceOnly species C1 in V_T = 1;  // substance in MWUSERUNIT_cell
  // Number of cancer cells in tumour
  substanceOnly species C2 in V_T = 1;  // substance in MWUSERUNIT_cell
  // Number of T1 cells in the tumour compartment
  substanceOnly species T1_V_T in V_T = 0;  // substance in MWUSERUNIT_cell
  // Number of T2 cells in the tumour compartment
  substanceOnly species T2_V_T in V_T = 0;  // substance in MWUSERUNIT_cell
  // Concentration of nivolumab in tumour compartment
  species nivolumab_V_T in V_T = 0;  // substance in MWDERIVEDUNIT_molarity_microliter
  // Number of naive T1 cells in the lymph node
  substanceOnly species nT1_V_LN in V_LN = 0.05210928;  // substance in MWUSERUNIT_cell
  // Number of activated T1 cells in the lymph node
  substanceOnly species aT1 in V_LN = 0;  // substance in MWUSERUNIT_cell
  // Number of T1 cells in the lymph node compartment
  substanceOnly species T1_V_LN in V_LN = 0;  // substance in MWUSERUNIT_cell
  // Concentration of IL2 in the lymph node compartment
  species IL2 in V_LN = 1e-18;  // substance in MWDERIVEDUNIT_molarity_millimeter___3
  // Number of naive T2 cells in the lymph node
  substanceOnly species nT2_V_LN in V_LN = 0.05210928;  // substance in MWUSERUNIT_cell
  // Number of activated T2 cells in the lymph node
  substanceOnly species aT2 in V_LN = 0;  // substance in MWUSERUNIT_cell
  // Number of T2 cells in the lymph node compartment
  substanceOnly species T2_V_LN in V_LN = 0;  // substance in MWUSERUNIT_cell
  // Concentration of nivolumab in lymph node compartment
  species nivolumab_V_LN in V_LN = 0;  // substance in MWDERIVEDUNIT_molarity_millimeter___3
  // concentration of PD1-PDL1 complex
  species PD1_PDL1 in syn_T1_C1 = 0;  // substance in MWDERIVEDUNIT_molecule__micrometer___2_micrometer___2
  // concentration of PD1-PDL2 complex
  species PD1_PDL2 in syn_T1_C1 = 0;  // substance in MWDERIVEDUNIT_molecule__micrometer___2_micrometer___2
  // concentration of PD1 in synapse
  species PD1 in syn_T1_C1 = T_PD1_total/A_Tcell;  // substance in MWDERIVEDUNIT_molecule__micrometer___2_micrometer___2
  // concentration of PDL1 in synapse
  species PDL1 in syn_T1_C1 = C_PDL1_total/A_cell;  // substance in MWDERIVEDUNIT_molecule__micrometer___2_micrometer___2
  // concentration of PDL2 in synapse
  species PDL2 in syn_T1_C1 = C_PDL2_total/A_cell;  // substance in MWDERIVEDUNIT_molecule__micrometer___2_micrometer___2
  // concentration of PD1-nivolumab complex
  species PD1_aPD1 in syn_T1_C1 = 0;  // substance in MWDERIVEDUNIT_molecule__micrometer___2_micrometer___2
  // concentration of PD1-nivolumab-PD1 complex
  species PD1_aPD1_PD1 in syn_T1_C1 = 0;  // substance in MWDERIVEDUNIT_molecule__micrometer___2_micrometer___2
  // concentration of PDL1-durvalumab complex
  species PDL1_aPDL1 in syn_T1_C1 = 0;  // substance in MWDERIVEDUNIT_molecule__micrometer___2_micrometer___2
  // concentration of PDL1-durvalumab-PDL1 complex
  species PDL1_aPDL1_PDL1 in syn_T1_C1 = 0;  // substance in MWDERIVEDUNIT_molecule__micrometer___2_micrometer___2

  // Parameters:
  // Rate of dead cell clearance from tumour compartment Rate of clearence of dead cancer cells
  k_cell_clear = 0.1 MWDERIVEDUNIT_1__day;
  cell = 1 MWUSERUNIT_cell;
  day = 1 MWBUILTINUNIT_day;
  // Average volume of cancer cell Volume of a single cancer cell
  vol_cell = 2527.311 MWDERIVEDUNIT_micrometer___3__cell;
  // Average volume of T cells Volume of a single T cell
  vol_Tcell = 176 MWDERIVEDUNIT_micrometer___3__cell;
  // Cancer-Free Tumour compartment volumeCancer-free Tumour compartment volume
  V_Tmin = 0.001 MWBUILTINPREFIX_micro_MWBUILTINUNIT_liter;
  C_total has MWUSERUNIT_cell;
  T_total has MWUSERUNIT_cell;
  T_total_LN has MWUSERUNIT_cell;
  R_Tcell has MWDERIVEDUNIT_cell__day;
  Tregs = 0 MWUSERUNIT_cell; Tregs is "Tregs_";
  H_APC = 0.5 dimensionless;
  H_mAPC = 1 dimensionless;
  H_PD1_C1 has dimensionless;
  H_PD1_APC = 0.9 dimensionless;
  H_CD28_C1 = 0.1 dimensionless;
  H_CD28_APC = 0.1 dimensionless;
  // Cancer cell growth rate Cancer cell growth rate
  k_C1_growth = 0.012 MWDERIVEDUNIT_1__day;
  // Cancer cell capacity Cancer cell capacity
  C_max = 4.18879e12 MWUSERUNIT_cell;
  // Cancer cell death rate from innate immune cells Cancer cell death rate
  k_C1_death = 1e-5 MWDERIVEDUNIT_1__day;
  // Rate of C1 killing by therapy
  k_C1_therapy = 0 MWDERIVEDUNIT_1__day;
  initial_tumour_diameter = 3 MWBUILTINPREFIX_centi_MWBUILTINUNIT_meter;
  // Cancer cell growth rate
  k_C2_growth = 0.006 MWDERIVEDUNIT_1__day;
  // Cancer cell death rate from innate immune cells Cancer cell death rate
  k_C2_death = 1e-5 MWDERIVEDUNIT_1__day;
  // Rate of C2 killing by therapy
  k_C2_therapy = 0 MWDERIVEDUNIT_1__day;
  // T Cell Diversity T cell Diversity
  div_T1 = 1110000 dimensionless;
  // Number of T cell clones T cell Clonality
  n_T1_clones = 100 dimensionless;
  // Rate of naive T cell transport into the LN Rate of T Cell Lymph Node Entry
  q_LN_T1_in = 0.07 MWDERIVEDUNIT_1__day__milliliter;
  // Rate of naive T cell transport out of the LN Rate of T Cell Lymph Node Exit
  q_T1_LN_out = 1.13 MWDERIVEDUNIT_1__day;
  // T1 activation rate
  k_T1_act = 10 MWDERIVEDUNIT_1__day;
  // T1 proliferation rate
  k_T1_pro = 1 MWDERIVEDUNIT_1__day;
  // T1 death rate
  k_T1_death = 0.01 MWDERIVEDUNIT_1__day;
  // rate of T1 tranport into the peripheral compartment
  q_T1_P_in = 0.201 MWDERIVEDUNIT_1__minute;
  // rate of T1 tranport out of the peripheral compartment
  q_T1_P_out = 1 MWDERIVEDUNIT_1__day;
  // rate of T1 tranport into the tumour compartment
  q_T1_T_in = 3.35e-6 MWDERIVEDUNIT_1__centimeter___3_minute;
  // Thymic output of nT1 Rate of Naive T Cell Output from the Thymus
  Q_nT1_thym = 3200000000 MWDERIVEDUNIT_cell__day;
  // rate of nT1 proliferation Rate of Naive T Cell Proliferation
  k_nT1_pro = 320000000 MWDERIVEDUNIT_cell__day;
  // half-maximal peripheral proliferation of of nT1 Naive T cell Density for Half-Maximal Peripheral Proliferation
  K_nT1_pro = 1000000000 MWUSERUNIT_cell;
  // rate of nT1 death Rate of Naive T Cell Death
  k_nT1_death = 0.002 MWDERIVEDUNIT_1__day;
  // rate of IL2 degradation IL2 Degradation Rate
  k_IL2_deg = 0.2 MWDERIVEDUNIT_1__minute;
  // rate of IL2 consumption by T cells IL2 Maximum Consumption Rate by T Cells
  k_IL2_cons = 6e-6 MWDERIVEDUNIT_nanomole__cell__hour;
  // rate of IL2 secretion from T cells IL2 Secretion Rate from Activated T Cells
  k_IL2_sec = 3e-5 MWDERIVEDUNIT_nanomole__cell__hour;
  // T cell activation half-maximal IL2 concentration IL2 Concentration for Half-Maximal Consumption by Cytotoxic T Cells
  IL2_50 = 0.32 MWBUILTINPREFIX_nano_MWBUILTINUNIT_molarity;
  // Treg activation half-maximal IL2 concentration IL2 Concentration for Half-Maximal Consumption by Tregs
  IL2_50_Treg = 0.0032 MWBUILTINPREFIX_nano_MWBUILTINUNIT_molarity;
  // numer of activated T cell generation with no IL2 Baseline Number of Activated T Cell Generations
  N0 = 15 dimensionless;
  // maximum number of activated T cell generations due to IL2 Additional Number of Activated T Cell Generations Due to IL2
  N_IL2 = 2 dimensionless;
  // Rate of T cell exhaustion by cancer cells Rate of T Cell Exhaustion from Cancer Cells
  k_T1 = 0.1 MWDERIVEDUNIT_1__day;
  // Rate of cancer cell death by T cells Cancer Cell Death Rate due to T Cells
  k_C_T1 = 0.09 MWDERIVEDUNIT_1__day;
  // Rate of T cell death by Tregs Rate of T Cell Exhaustion from Tregs
  k_Treg = 2 MWDERIVEDUNIT_1__day;
  H_P1 = 1 dimensionless;
  N_aT has dimensionless;
  // T Cell Diversity T cell Diversity
  div_T2 = 1110000 dimensionless;
  // Number of T cell clones T cell Clonality
  n_T2_clones = 100 dimensionless;
  // Rate of naive T cell transport into the LN Rate of T Cell Lymph Node Entry
  q_LN_T2_in = 0.07 MWDERIVEDUNIT_1__day__milliliter;
  // Rate of naive T cell transport out of the LN Rate of T Cell Lymph Node Exit
  q_T2_LN_out = 1.13 MWDERIVEDUNIT_1__day;
  // T2 activation rate
  k_T2_act = 10 MWDERIVEDUNIT_1__day;
  // T2 proliferation rate
  k_T2_pro = 1 MWDERIVEDUNIT_1__day;
  // T2 death rate
  k_T2_death = 0.01 MWDERIVEDUNIT_1__day;
  // rate of T2 tranport into the peripheral compartment
  q_T2_P_in = 0.201 MWDERIVEDUNIT_1__minute;
  // rate of T2 tranport out of the peripheral compartment
  q_T2_P_out = 1 MWDERIVEDUNIT_1__day;
  // rate of T2 tranport into the tumour compartment
  q_T2_T_in = 3.35e-6 MWDERIVEDUNIT_1__centimeter___3_minute;
  // Thymic output of nT2 Rate of Naive T Cell Output from the Thymus
  Q_nT2_thym = 3200000000 MWDERIVEDUNIT_cell__day;
  // rate of nT2 proliferation Rate of Naive T Cell Proliferation
  k_nT2_pro = 320000000 MWDERIVEDUNIT_cell__day;
  // half-maximal peripheral proliferation of of nT2 Naive T cell Density for Half-Maximal Peripheral Proliferation
  K_nT2_pro = 1000000000 MWUSERUNIT_cell;
  // rate of nT2 death Rate of Naive T Cell Death
  k_nT2_death = 0.002 MWDERIVEDUNIT_1__day;
  // Rate of T cell exhaustion by cancer cells Rate of T Cell Exhaustion from Cancer Cells
  k_T2 = 0.1 MWDERIVEDUNIT_1__day;
  // Rate of cancer cell death by T cells
  k_C_T2 = 0.009 MWDERIVEDUNIT_1__day;
  H_P2 = 1 dimensionless;
  // Surface area of the synapse Synapse Surface Area
  A_syn = 37.8 MWDERIVEDUNIT_micrometer___2;
  // Surface area of the T cell T Cell Surface Area
  A_Tcell = 151.3104 MWDERIVEDUNIT_micrometer___2;
  // Surface area of the Cancer cell Cancer Cell Surface Area
  A_cell = 897.2703 MWDERIVEDUNIT_micrometer___2;
  // Surface area of the APC APC Surface Area
  A_APC = 900 MWDERIVEDUNIT_micrometer___2;
  // kon of PD1-PDL1 binding PD1-PDL1 Binding Rate
  kon_PD1_PDL1 = 0.05833333 MWDERIVEDUNIT_1__micromolarity_nanometer_second;
  // Concentration of PD1 antibody
  aPD1 has MWBUILTINUNIT_molarity;
  // Concentration of PDL1 antibody
  aPDL1 = 0 MWBUILTINUNIT_molarity;
  q_P_nivolumab = 1.73655e-7 MWDERIVEDUNIT_1__second;
  q_T_nivolumab = 8.52e-6 MWDERIVEDUNIT_1__second;
  q_LN_nivolumab = 1.73655e-7 MWDERIVEDUNIT_1__second;
  q_LD_nivolumab = 0.0015 MWDERIVEDUNIT_1__minute;
  k_cl_nivolumab = 7.1813e-7 MWDERIVEDUNIT_1__second;
  gamma_C_nivolumab = 0.77378 dimensionless;
  gamma_P_nivolumab = 0.058847 dimensionless;
  gamma_T_nivolumab = 0.718 dimensionless;
  gamma_LN_nivolumab = 0.1 dimensionless;
  // kon of PD1-PDL2 binding PD1-PDL2 Binding Rate
  kon_PD1_PDL2 = 0.07666667 MWDERIVEDUNIT_1__micromolarity_nanometer_second;
  // kon of PD1-antiPD1 binding PD1-nivolumab Binding Rate Constant
  kon_PD1_aPD1 = 1300000 MWDERIVEDUNIT_1__molarity_second;
  // kon of PDL1-antiPDL1 binding PDL1-durvalumab Binding Rate Constant
  kon_PDL1_aPDL1 = 430000 MWDERIVEDUNIT_1__molarity_second;
  // koff of PD1-PDL1 binding PD1-PDL1 Unbinding Rate
  koff_PD1_PDL1 = 1.435 MWDERIVEDUNIT_1__second;
  // koff of PD1-PDL2 binding PD1-PDL2 Unbinding Rate
  koff_PD1_PDL2 = 0.529 MWDERIVEDUNIT_1__second;
  // koff of PD1-nivolumab binding PD1-aPD1 Unbinding Rate
  koff_PD1_aPD1 = 0.00338 MWDERIVEDUNIT_1__second;
  // koff of PDL1-durvalumab binding PDL1-aPDL1 Unbinding Rate
  koff_PDL1_aPDL1 = 0.028595 MWDERIVEDUNIT_1__second;
  // Antibody cross-arm binding efficiency PD1 Antibody Cross-Arm Binding Strength Corrected for 2D
  Chi_PD1 = 3.333333 MWDERIVEDUNIT_1__nanometer;
  // Antibody cross-arm binding efficiency PDL1 Antibody Cross-Arm Binding Strength Corrected for 2D
  Chi_PDL1 = 33.33333 MWDERIVEDUNIT_1__nanometer;
  // PD1/PDL1 concentration for half-maximal T cell inactivation PD1-PDL1 Concentration for Half-Maximal PD1-Induced Reduction of T Cell Killing
  PD1_50 = 100 MWDERIVEDUNIT_molecule__micrometer___2;
  // Hill coefficient for PD1/PDL1 half-maximal T cell inactivation Hill Coefficient for PD1-Induced Reduction of T Cell Killing
  n_PD1 = 2 dimensionless;
  // Concentration of PD1 on T cells Total number of PD1 Molecules on T Cells
  T_PD1_total = 60000 MWBUILTINUNIT_molecule;
  // Number of PDL1 molecules per cancer cell Total number of PDL1 Molecules on Cancer Cells
  C_PDL1_total = 1600000 MWBUILTINUNIT_molecule;
  // Number of PDL2 molecules per cancer cell Total number of PDL2 Molecules on Cancer Cells
  C_PDL2_total = 40000 MWBUILTINUNIT_molecule;
  // Number of PDL1 molecules per APC Total number of PDL1 Molecules on Cancer Cells
  APC_PDL1_total = 1600000 MWBUILTINUNIT_molecule;
  // Number of PDL2 molecules per APC Total number of PDL2 Molecules on APCs
  APC_PDL2_total = 40000 MWBUILTINUNIT_molecule;

  // Assignment rules:
  V_T := V_Tmin + vol_cell*C_x + vol_Tcell*T_exh + vol_cell*C1 + vol_cell*C2 + vol_Tcell*T1_V_T + vol_Tcell*T2_V_T;
  C_total := 0*cell + C1 + C2;
  T_total := 0*cell + T1_V_T + T2_V_T;
  T_total_LN := 0*cell + T1_V_LN + T2_V_LN;
  R_Tcell := 0*cell/day + k_C_T1*T1_V_T*C1/(C_total + T_total + cell)*(1 - H_PD1_C1) + k_C_T2*T2_V_T*C1/(C_total + T_total + cell)*(1 - H_PD1_C1) + k_C_T2*T2_V_T*C2/(C_total + T_total + cell)*(1 - H_PD1_C1);
  N_aT := N0 + N_IL2*IL2/(IL2_50 + IL2);
  aPD1 := nivolumab_V_T;
  H_PD1_C1 := ((PD1_PDL1 + PD1_PDL2)/PD1_50)^n_PD1/(((PD1_PDL1 + PD1_PDL2)/PD1_50)^n_PD1 + 1);

  // Reactions:
  Reaction_1: C_x => ; k_cell_clear*C_x;
  Reaction_2: T_exh => ; k_cell_clear*T_exh;
  // Cancer cell growth (Logistic model based on Komarova and reviewed in Marusic)
  Reaction_3: => C1; k_C1_growth*C1*(1 - C_total/C_max);
  // Cancer cell death
  Reaction_4: C1 => C_x; k_C1_death*C1;
  // Cancer cell growth (Logistic model based on Komarova and reviewed in Marusic)
  Reaction_5: => C2; k_C2_growth*C2*(1 - C_total/C_max);
  // Cancer cell death
  Reaction_6: C2 => C_x; k_C2_death*C2;
  // Thymic output of naive T cell to blood
  Reaction_7: => nT1_V_C; Q_nT1_thym/div_T1;
  // Naive T cell proliferation in the peripheral compartment
  Reaction_8: => nT1_V_P; k_nT1_pro/div_T1*nT1_V_P/(K_nT1_pro/div_T1 + nT1_V_P);
  // Naive T cell proliferation in the central compartment
  Reaction_9: => nT1_V_C; k_nT1_pro/div_T1*nT1_V_C/(K_nT1_pro/div_T1 + nT1_V_C);
  // Naive T cell death in the peripheral compartment
  Reaction_10: nT1_V_P => ; k_nT1_death*nT1_V_P;
  // Naive T cell death in the central compartment
  Reaction_11: nT1_V_C => ; k_nT1_death*nT1_V_C;
  // Naive T cell entry into the peripheral compartment
  Reaction_12: nT1_V_C => nT1_V_P; q_T1_P_in*nT1_V_C;
  // Naive T cell exit from the peripheral compartment
  Reaction_13: nT1_V_P => nT1_V_C; q_T1_P_out*nT1_V_P;
  // Naive T cell entry into the lymph node
  Reaction_14: nT1_V_C => nT1_V_LN; q_LN_T1_in*nT1_V_C*V_C;
  // Naive T cell exit from the lymph node
  Reaction_15: nT1_V_LN => nT1_V_C; q_T1_LN_out*nT1_V_LN;
  // Naive T cell activation
  Reaction_16: nT1_V_LN => ; k_T1_act*H_mAPC*H_P1*nT1_V_LN;
  // Naive T cell activation
  Reaction_17: => aT1; k_T1_act*H_mAPC*H_P1*nT1_V_LN*n_T1_clones;
  // aT1 cell proliferation
  Reaction_18: aT1 => ; k_T1_pro*aT1;
  // aT1 cell proliferation
  Reaction_19: => T1_V_LN; k_T1_pro*2^N_aT*aT1;
  // T cell death in the central compartment
  Reaction_20: T1_V_C => ; k_T1_death*T1_V_C;
  // T cell death in the peripheral compartment
  Reaction_21: T1_V_P => ; k_T1_death*T1_V_P;
  // T cell death in the tumour compartment
  Reaction_22: T1_V_T => T_exh; k_T1_death*T1_V_T;
  // T cell death in the lymph node compartment
  Reaction_23: T1_V_LN => ; k_T1_death*T1_V_LN;
  // T cell death from Tregs
  Reaction_24: T1_V_T => T_exh; k_Treg*T1_V_T*Tregs/(C_total + T_total + cell);
  // T cell death from cancer
  Reaction_25: T1_V_T => T_exh; k_T1*T1_V_T*C_total/(C_total + T_total + cell)*H_PD1_C1;
  // T cell transport into the peripheral compartment
  Reaction_26: T1_V_C => T1_V_P; q_T1_P_in*T1_V_C;
  // T cell transport out of the peripheral compartment
  Reaction_27: T1_V_P => T1_V_C; q_T1_P_out*T1_V_P;
  // T cell transport into the tumour compartment
  Reaction_28: T1_V_C => T1_V_T; q_T1_T_in*V_T*T1_V_C;
  // T cell transport out of the lymph node compartment
  Reaction_29: T1_V_LN => T1_V_C; q_T1_LN_out*T1_V_LN;
  // IL2 degradation
  Reaction_30: IL2 => ; k_IL2_deg*IL2*V_LN;
  // IL2 consumption by T cells
  Reaction_31: IL2 => ; k_IL2_cons*T_total_LN*IL2/(IL2_50 + IL2);
  // IL2 secretion from activated T cells
  Reaction_32: => IL2; k_IL2_sec*aT1;
  // Cancer cell killing by T cells
  Reaction_33: C1 => C_x; k_C_T1*T1_V_T*C1/(C_total + T_total + cell)*(1 - H_PD1_C1);
  // Thymic output of naive T cell to blood
  Reaction_34: => nT2_V_C; Q_nT2_thym/div_T2;
  // Naive T cell proliferation in the peripheral compartment
  Reaction_35: => nT2_V_P; k_nT2_pro/div_T2*nT2_V_P/(K_nT2_pro/div_T2 + nT2_V_P);
  // Naive T cell proliferation in the central compartment
  Reaction_36: => nT2_V_C; k_nT2_pro/div_T2*nT2_V_C/(K_nT2_pro/div_T2 + nT2_V_C);
  // Naive T cell death in the peripheral compartment
  Reaction_37: nT2_V_P => ; k_nT2_death*nT2_V_P;
  // Naive T cell death in the central compartment
  Reaction_38: nT2_V_C => ; k_nT2_death*nT2_V_C;
  // Naive T cell entry into the peripheral compartment
  Reaction_39: nT2_V_C => nT2_V_P; q_T2_P_in*nT2_V_C;
  // Naive T cell exit from the peripheral compartment
  Reaction_40: nT2_V_P => nT2_V_C; q_T2_P_out*nT2_V_P;
  // Naive T cell entry into the lymph node
  Reaction_41: nT2_V_C => nT2_V_LN; q_LN_T2_in*nT2_V_C*V_C;
  // Naive T cell exit from the lymph node
  Reaction_42: nT2_V_LN => nT2_V_C; q_T2_LN_out*nT2_V_LN;
  // Naive T cell activation
  Reaction_43: nT2_V_LN => ; k_T2_act*H_mAPC*H_P2*nT2_V_LN;
  // Naive T cell activation
  Reaction_44: => aT2; k_T2_act*H_mAPC*H_P2*nT2_V_LN*n_T2_clones;
  // aT2 cell proliferation
  Reaction_45: aT2 => ; k_T2_pro*aT2;
  // aT2 cell proliferation
  Reaction_46: => T2_V_LN; k_T2_pro*2^N_aT*aT2;
  // T cell death in the central compartment
  Reaction_47: T2_V_C => ; k_T2_death*T2_V_C;
  // T cell death in the peripheral compartment
  Reaction_48: T2_V_P => ; k_T2_death*T2_V_P;
  // T cell death in the tumour compartment
  Reaction_49: T2_V_T => T_exh; k_T2_death*T2_V_T;
  // T cell death in the lymph node compartment
  Reaction_50: T2_V_LN => ; k_T2_death*T2_V_LN;
  // T cell death from Tregs
  Reaction_51: T2_V_T => T_exh; k_Treg*T2_V_T*Tregs/(C_total + T_total + cell);
  // T cell death from cancer
  Reaction_52: T2_V_T => T_exh; k_T2*T2_V_T*C_total/(C_total + T_total + cell)*H_PD1_C1;
  // T cell transport into the peripheral compartment
  Reaction_53: T2_V_C => T2_V_P; q_T2_P_in*T2_V_C;
  // T cell transport out of the peripheral compartment
  Reaction_54: T2_V_P => T2_V_C; q_T2_P_out*T2_V_P;
  // T cell transport into the tumour compartment
  Reaction_55: T2_V_C => T2_V_T; q_T2_T_in*V_T*T2_V_C;
  // T cell transport out of the lymph node compartment
  Reaction_56: T2_V_LN => T2_V_C; q_T2_LN_out*T2_V_LN;
  // IL2 secretion from activated T cells
  Reaction_57: => IL2; k_IL2_sec*aT2;
  // Cancer cell killing by T cells
  Reaction_58: C1 => C_x; k_C_T2*T2_V_T*C1/(C_total + T_total + cell)*(1 - H_PD1_C1);
  // Cancer cell killing by T cells
  Reaction_59: C2 => C_x; k_C_T2*T2_V_T*C2/(C_total + T_total + cell)*(1 - H_PD1_C1);
  // nivolumab diffusive transport to peripheral compartment
  Reaction_60: nivolumab_V_C -> nivolumab_V_P; q_P_nivolumab*(nivolumab_V_C/gamma_C_nivolumab - nivolumab_V_P/gamma_P_nivolumab)*V_C;
  // nivolumab diffusive transport to tumor compartment
  Reaction_61: nivolumab_V_C -> nivolumab_V_T; q_T_nivolumab*(nivolumab_V_C/gamma_C_nivolumab - nivolumab_V_T/gamma_T_nivolumab)*V_C;
  // nivolumab diffusive transport to lymph node compartment
  Reaction_62: nivolumab_V_C -> nivolumab_V_LN; q_LN_nivolumab*(nivolumab_V_C/gamma_C_nivolumab - nivolumab_V_LN/gamma_LN_nivolumab)*V_C;
  // nivolumab convective transport from tumor to lymph node
  Reaction_63: nivolumab_V_T => nivolumab_V_LN; q_LD_nivolumab*nivolumab_V_T/gamma_T_nivolumab*V_T;
  // nivolumab convective transport from lymph node to central
  Reaction_64: nivolumab_V_LN => nivolumab_V_C; q_LD_nivolumab*nivolumab_V_LN/gamma_LN_nivolumab*V_LN;
  // Drug clearance from central compartment
  Reaction_65: nivolumab_V_C => ; k_cl_nivolumab*nivolumab_V_C*V_C;
  // binding and unbinding of PD1 PDL1 in synapse
  Reaction_66: PD1 + PDL1 -> PD1_PDL1; (kon_PD1_PDL1*PD1*PDL1 - koff_PD1_PDL1*PD1_PDL1)*syn_T1_C1;
  // binding and unbinding of PD1 PDL2 in synapse
  Reaction_67: PD1 + PDL2 -> PD1_PDL2; (kon_PD1_PDL2*PD1*PDL2 - koff_PD1_PDL2*PD1_PDL2)*syn_T1_C1;
  // binding and unbinding of PD1 to anti-PD1 on T1 surface in synapse
  Reaction_68: PD1 -> PD1_aPD1; (2*kon_PD1_aPD1*(PD1*aPD1/gamma_C_nivolumab) - koff_PD1_aPD1*PD1_aPD1)*syn_T1_C1;
  // binding and unbinding of PD1 to PD1-Nivo on T1 surface in synapse
  Reaction_69: PD1_aPD1 + PD1 -> PD1_aPD1_PD1; (Chi_PD1*kon_PD1_aPD1*PD1*PD1_aPD1 - 2*koff_PD1_aPD1*PD1_aPD1_PD1)*syn_T1_C1;
  // binding and unbinding of PDL1 to anit-PDL1 on C1 surface in synapse
  Reaction_70: PDL1 -> PDL1_aPDL1; (2*kon_PDL1_aPDL1*(PDL1*aPDL1/1) - koff_PDL1_aPDL1*PDL1_aPDL1)*syn_T1_C1;
  // binding and unbinding of PDL1 to PDL1-anti-PDL1 on C1 surface in synapse
  Reaction_71: PDL1_aPDL1 + PDL1 -> PDL1_aPDL1_PDL1; (Chi_PDL1*kon_PDL1_aPDL1*PDL1*PDL1_aPDL1 - 2*koff_PDL1_aPDL1*PDL1_aPDL1_PDL1)*syn_T1_C1;

  // Events:
  event_211: at (C1 < 0.9*cell): C1 = 0*cell;
  event_212: at (C2 < 0.9*cell): C2 = 0*cell;

  // Unit definitions:
  unit MWBUILTINUNIT_liter = metre^3 * 1e-3 dimensionless;
  unit MWBUILTINPREFIX_micro_MWBUILTINUNIT_liter = metre^3 * 1e-9 dimensionless; MWBUILTINPREFIX_micro_MWBUILTINUNIT_liter is "microliter";
  unit MWDERIVEDUNIT_millimeter___3 = metre^3 * 1e-9 dimensionless; MWDERIVEDUNIT_millimeter___3 is "millimeter^3";
  unit MWDERIVEDUNIT_micrometer___2 = metre^2 * 1e-12 dimensionless; MWDERIVEDUNIT_micrometer___2 is "micrometer^2";
  unit MWUSERUNIT_cell = 1.660539e-24 mole;
  unit MWBUILTINUNIT_molarity = mole * 1000 dimensionless / metre^3;
  unit MWDERIVEDUNIT_molarity_liter = mole; MWDERIVEDUNIT_molarity_liter is "(molarity)*(liter)";
  unit MWDERIVEDUNIT_molarity_microliter = 1e-6 mole; MWDERIVEDUNIT_molarity_microliter is "(molarity)*(microliter)";
  unit MWDERIVEDUNIT_molarity_millimeter___3 = 1e-6 mole; MWDERIVEDUNIT_molarity_millimeter___3 is "(molarity)*(millimeter^3)";
  unit MWDERIVEDUNIT_molecule__micrometer___2 = mole * 1.660539e-12 dimensionless / metre^2; MWDERIVEDUNIT_molecule__micrometer___2 is "molecule/micrometer^2";
  unit MWDERIVEDUNIT_molecule__micrometer___2_micrometer___2 = 1.660539e-24 mole; MWDERIVEDUNIT_molecule__micrometer___2_micrometer___2 is "(molecule/micrometer^2)*(micrometer^2)";
  unit MWDERIVEDUNIT_1__day = 1.157407e-5 dimensionless / second; MWDERIVEDUNIT_1__day is "1/day";
  unit MWBUILTINUNIT_day = 86400 second;
  unit MWDERIVEDUNIT_micrometer___3__cell = metre^3 * 602214.2 dimensionless / mole; MWDERIVEDUNIT_micrometer___3__cell is "micrometer^3/cell";
  unit MWDERIVEDUNIT_cell__day = mole * 1.92192e-29 dimensionless / second; MWDERIVEDUNIT_cell__day is "cell/day";
  unit MWBUILTINPREFIX_centi_MWBUILTINUNIT_meter = 0.01 metre; MWBUILTINPREFIX_centi_MWBUILTINUNIT_meter is "centimeter";
  unit MWDERIVEDUNIT_1__day__milliliter = 11.57407 dimensionless / (metre^3 * second); MWDERIVEDUNIT_1__day__milliliter is "1/day/milliliter";
  unit MWDERIVEDUNIT_1__minute = 0.01666667 dimensionless / second; MWDERIVEDUNIT_1__minute is "1/minute";
  unit MWDERIVEDUNIT_1__centimeter___3_minute = 16666.67 dimensionless / (metre^3 * second); MWDERIVEDUNIT_1__centimeter___3_minute is "1/(centimeter^3*minute)";
  unit MWDERIVEDUNIT_nanomole__cell__hour = 1.672817e11 dimensionless / second; MWDERIVEDUNIT_nanomole__cell__hour is "nanomole/cell/hour";
  unit MWBUILTINPREFIX_nano_MWBUILTINUNIT_molarity = mole * 1e-6 dimensionless / metre^3; MWBUILTINPREFIX_nano_MWBUILTINUNIT_molarity is "nanomolarity";
  unit MWDERIVEDUNIT_1__micromolarity_nanometer_second = metre^2 * 1e12 dimensionless / (mole * second); MWDERIVEDUNIT_1__micromolarity_nanometer_second is "1/(micromolarity*nanometer*second)";
  unit MWDERIVEDUNIT_1__second = dimensionless / second; MWDERIVEDUNIT_1__second is "1/second";
  unit MWDERIVEDUNIT_1__molarity_second = metre^3 * 1e-3 dimensionless / (mole * second); MWDERIVEDUNIT_1__molarity_second is "1/(molarity*second)";
  unit MWDERIVEDUNIT_1__nanometer = 1e9 dimensionless / metre; MWDERIVEDUNIT_1__nanometer is "1/nanometer";
  unit MWBUILTINUNIT_molecule = 1.660539e-24 mole;
end
